# OpenSim document version 30000
Model varius7 points moved scaled mass corrected:
  credits: Peter Bishop, Christofer Clemente, Taylor Dick
  length_units: meters
  force_units: N
  gravity: 0 0 -9.80665
  BodySet:
    Body ground: mass=0 mass_center=(0 0 0) inertia_xx=0 inertia_yy=0 inertia_zz=0
    Body Thorax: mass=3.387807 mass_center=(-0.0154368 0 -0.000953338) inertia_xx=0.001826403 inertia_yy=0.0338092
        inertia_zz=0.0338092 inertia_xy=1.371518e-12 inertia_xz=-6.915661e-14 inertia_yz=-1.361285e-12
        meshes=(Scapulocoracoids.stl Interclavicle_clavicles.stl)
      CustomJoint ThoraxToground: parent_body=ground location_in_parent=(0 0 0) location=(0 0 0)
        Coordinate Thorax_pitch: motion_type=rotational default_value=0 range=(-0.785398 0.785398) clamped=true
            locked=true
        Coordinate Thorax_roll: motion_type=rotational default_value=0 range=(-0.785398 0.785398) clamped=true
            locked=true
        Coordinate Thorax_yaw: motion_type=rotational default_value=0 range=(-3.141593 3.141593) clamped=true
        Coordinate Thorax_Tx: motion_type=translational default_value=0 range=(-2 2) clamped=true
        Coordinate Thorax_Ty: motion_type=translational default_value=0 range=(-2 2) clamped=true
        Coordinate Thorax_Tz: motion_type=translational default_value=0 range=(-2 2) clamped=true
        SpatialTransform:
          TransformAxis rotation1: coordinates=Thorax_pitch axis=(0 1 0) LinearFunction(coefficients=1 0)
          TransformAxis rotation2: coordinates=Thorax_roll axis=(1 0 0) LinearFunction(coefficients=1 0)
          TransformAxis rotation3: coordinates=Thorax_yaw axis=(0 0 1) LinearFunction(coefficients=1 0)
          TransformAxis translation1: coordinates=Thorax_Tx axis=(1 0 0) LinearFunction(coefficients=1 0)
          TransformAxis translation2: coordinates=Thorax_Ty axis=(0 1 0) LinearFunction(coefficients=1 0)
          TransformAxis translation3: coordinates=Thorax_Tz axis=(0 0 1) LinearFunction(coefficients=1 0)
    Body Left_upper_arm: mass=0.1616732 mass_center=(-0.000817348 0.0320762 1.45453e-5) inertia_xx=6.847049e-5
        inertia_yy=2.605623e-5 inertia_zz=6.849804e-5 inertia_xy=-1.081475e-6 inertia_xz=-4.904001e-10
        inertia_yz=1.924545e-8 meshes=Left_humerus.stl
      CustomJoint L_shoulder: parent_body=Thorax location_in_parent=(-0.01539715 0.03190934 -0.0008216081)
          location=(0 0 0)
        Coordinate L_shoulder_flex-ext: motion_type=rotational default_value=0 range=(-1.570796 1.570796) clamped=true
        Coordinate L_shoulder_adb-add: motion_type=rotational default_value=0 range=(-1.570796 1.570796) clamped=true
        Coordinate L_shoulder_LAR: motion_type=rotational default_value=0 range=(-0.785398 0.785398) clamped=true
        SpatialTransform: axes_held_at_zero=(translation1 translation2 translation3)
          TransformAxis rotation1: coordinates=L_shoulder_flex-ext axis=(0 0 1) LinearFunction(coefficients=1 0)
          TransformAxis rotation2: coordinates=L_shoulder_adb-add axis=(1 0 0) LinearFunction(coefficients=1 0)
          TransformAxis rotation3: coordinates=L_shoulder_LAR axis=(0 1 0) LinearFunction(coefficients=1 0)
    Body Left_ulna: mass=0.05274569 mass_center=(0.00649966 0.0384117 0.003095) inertia_xx=2.287074e-5
        inertia_yy=6.154786e-6 inertia_zz=2.472525e-5 inertia_xy=6.13212e-6 inertia_xz=5.556223e-7
        inertia_yz=1.696574e-6 meshes=Left_ulna.stl
      CustomJoint L_elbow: parent_body=Left_upper_arm location_in_parent=(-0.001633295 0.06415245 2.928667e-5)
          orientation_in_parent=(1.501142 1.570796 -1.50114) location=(0 0 0) orientation=(1.501142 1.570796 -1.50114)
        Coordinate L_elbow_flex-ext: motion_type=rotational default_value=0 range=(-2.356194 0) clamped=true
        SpatialTransform: axes_held_at_zero=(rotation2 rotation3 translation1 translation2 translation3)
          TransformAxis rotation1: coordinates=L_elbow_flex-ext axis=(0 0 1) LinearFunction(coefficients=1 0)
    Body Left_radius: mass=0.05274569 mass_center=(0.0213416 0.0356776 0.003095) inertia_xx=2.287074e-5
        inertia_yy=6.154786e-6 inertia_zz=2.472525e-5 inertia_xy=6.13212e-6 inertia_xz=5.556223e-7
        inertia_yz=1.696574e-6 meshes=Left_radius_1.stl
      CustomJoint L_ulna-radius: parent_body=Left_ulna location_in_parent=(0.01158317 0.03856911 0.002361617)
          orientation_in_parent=(0.120497 -0.00410001 -0.06835) location=(0 0 0)
          orientation=(0.120497 -0.00410001 -0.06835)
        Coordinate L_forearm_pron-sup: motion_type=rotational default_value=0 range=(0 1.745329) clamped=true
        SpatialTransform: axes_held_at_zero=(rotation2 rotation3 translation1 translation2 translation3)
          TransformAxis rotation1: coordinates=L_forearm_pron-sup axis=(0 1 0) LinearFunction(coefficients=1 0)
    Body Left_carpals_metacarpals: mass=0.03331248 mass_center=(-0.00199708 0.0132673 0.00139755)
        inertia_xx=2.446946e-6 inertia_yy=9.72127e-7 inertia_zz=2.464389e-6 inertia_xy=-2.271465e-7
        inertia_xz=-2.392733e-8 inertia_yz=1.589579e-7 meshes=Left_carpals_metacarpals.stl
      CustomJoint L_wrist: parent_body=Left_radius location_in_parent=(0.01079067 0.02974579 0.003828862)
          orientation_in_parent=(-1.56793 -1.360169 -1.56793) location=(0 0 0)
          orientation=(-1.56793 -1.360169 -1.56793)
        Coordinate L_wrist_flex-ext: motion_type=rotational default_value=0 range=(-1.570796 1.570796) clamped=true
        SpatialTransform: axes_held_at_zero=(rotation2 rotation3 translation1 translation2 translation3)
          TransformAxis rotation1: coordinates=L_wrist_flex-ext axis=(0 0 1) LinearFunction(coefficients=1 0)
    Body Left_manual_digits: mass=0.01811933 mass_center=(-0.00931533 0.0180554 -0.0045875) inertia_xx=2.213467e-6
        inertia_yy=8.225499e-7 inertia_zz=2.595639e-6 inertia_xy=-9.779228e-7 inertia_xz=2.484702e-7
        inertia_yz=-4.815956e-7 meshes=Left_manual_digits.stl
      CustomJoint L_MCP_flex-ext: parent_body=Left_carpals_metacarpals
          location_in_parent=(-0.003994599 0.0265351 0.002794631) orientation_in_parent=(-1.97925 1.216526 1.979246)
          location=(0 0 0) orientation=(-1.97925 1.216526 1.979246)
        Coordinate L_MCP_flex-ext: motion_type=rotational default_value=0 range=(-1.570796 1.570796) clamped=true
        SpatialTransform: axes_held_at_zero=(rotation2 rotation3 translation1 translation2 translation3)
          TransformAxis rotation1: coordinates=L_MCP_flex-ext axis=(0 0 1) LinearFunction(coefficients=1 0)
    Body Right_upper_arm: mass=0.1616732 mass_center=(-0.000817348 -0.0320762 1.45453e-5) inertia_xx=6.847049e-5
        inertia_yy=2.605623e-5 inertia_zz=6.849804e-5 inertia_xy=1.08148e-6 inertia_xz=-4.90504e-10
        inertia_yz=-1.924577e-8 meshes=Right_humerus.stl
      CustomJoint R_shoulder: parent_body=Thorax location_in_parent=(-0.01539715 -0.03376489 -0.0008216081)
          orientation_in_parent=(-3.14159 0 -3.14159) location=(0 0 0) orientation=(-3.14159 0 -3.14159)
        Coordinate R_shoulder_flex-ext: motion_type=rotational default_value=0 range=(-1.570796 1.570796) clamped=true
        Coordinate R_shoulder_adb-add: motion_type=rotational default_value=0 range=(-1.570796 1.570796) clamped=true
        Coordinate R_shoulder_LAR: motion_type=rotational default_value=0 range=(-0.785398 0.872665) clamped=true
        SpatialTransform: axes_held_at_zero=(translation1 translation2 translation3)
          TransformAxis rotation1: coordinates=R_shoulder_flex-ext axis=(0 0 1) LinearFunction(coefficients=1 0)
          TransformAxis rotation2: coordinates=R_shoulder_adb-add axis=(1 0 0) LinearFunction(coefficients=1 0)
          TransformAxis rotation3: coordinates=R_shoulder_LAR axis=(0 1 0) LinearFunction(coefficients=1 0)
      WrapEllipsoid Right_shoulder_wrapping: xyz_body_rotation=(0.4 0.32 0) translation=(-0.00146433 0 0.00112641)
          quadrant=all dimensions=(0.0112641 0.00788487 0.00563205)
      WrapEllipsoid Right_DPC_wrapping: xyz_body_rotation=(0 0.2 -0.5) translation=(0.00529413 -0.00799751 -0.0123905)
          quadrant=all dimensions=(0.00337923 0.00450564 0.00506885)
      WrapEllipsoid Right_elbow_wrapping: xyz_body_rotation=(0 -0.1 0) translation=(-0.00146433 -0.0619526 2.92867e-5)
          quadrant=all dimensions=(0.0148686 0.00901128 0.00788487)
      WrapEllipsoid Right_elbow_wrapping_small: xyz_body_rotation=(0 -0.1 0.7) translation=(-0.00653318 -0.0619526 0)
          quadrant=all dimensions=(0.0168962 0.00450564 0.00450564)
    Body Right_ulna: mass=0.05274569 mass_center=(0.00649966 -0.0361108 0.003095) inertia_xx=2.287074e-5
        inertia_yy=6.154786e-6 inertia_zz=2.472525e-5 inertia_xy=-6.13212e-6 inertia_xz=5.556223e-7
        inertia_yz=-1.696574e-6 meshes=Right_ulna.stl
      CustomJoint R_elbow: parent_body=Right_upper_arm location_in_parent=(-0.001633295 -0.06415245 2.928667e-5)
          orientation_in_parent=(1.640993 -1.556654 1.640993) location=(0 0 0)
          orientation=(1.640993 -1.556654 1.640993)
        Coordinate R_elbow_flex-ext: motion_type=rotational default_value=0 range=(-2.356194 0) clamped=true
        SpatialTransform: axes_held_at_zero=(rotation2 rotation3 translation1 translation2 translation3)
          TransformAxis rotation1: coordinates=R_elbow_flex-ext axis=(0 0 1) LinearFunction(coefficients=1 0)
    Body Right_radius: mass=0.05274569 mass_center=(0.0213416 -0.0333767 0.003095) inertia_xx=2.287074e-5
        inertia_yy=6.154786e-6 inertia_zz=2.472525e-5 inertia_xy=-6.13212e-6 inertia_xz=5.556223e-7
        inertia_yz=-1.696574e-6 meshes=Right_radius_1.stl
      CustomJoint R_ulna-radius: parent_body=Right_ulna location_in_parent=(0.01158317 -0.03856911 0.002361617)
          orientation_in_parent=(-0.1205 -0.00410001 0.068351) location=(0 0 0)
          orientation=(-0.1205 -0.00410001 0.068351)
        Coordinate R_forearm_pron-sup: motion_type=rotational default_value=0 range=(0 2.79253) clamped=true
        SpatialTransform: axes_held_at_zero=(rotation2 rotation3 translation1 translation2 translation3)
          TransformAxis rotation1: coordinates=R_forearm_pron-sup axis=(0 1 0) LinearFunction(coefficients=1 0)
      WrapCylinder Right_wrist_wrapping_flex: xyz_body_rotation=(-1.5 -2 0)
          translation=(0.0107907 -0.0277837 0.00423371) quadrant=all radius=0.007938208 length=0.07276691
      WrapCylinder Right_wrist_wrapping_ext: xyz_body_rotation=(0.8 -1 0.5) translation=(0.0107907 -0.0264607 0)
          quadrant=all radius=0.006615173 length=0.07276691
    Body Right_carpals_metacarpals: mass=0.03331248 mass_center=(-0.00199708 -0.0132673 0.00139755)
        inertia_xx=2.446946e-6 inertia_yy=9.72127e-7 inertia_zz=2.464389e-6 inertia_xy=2.271465e-7
        inertia_xz=-2.392733e-8 inertia_yz=-1.589579e-7 meshes=Right_carpals_metacarpals.stl
      CustomJoint R_wrist: parent_body=Right_radius location_in_parent=(0.01079067 -0.02974579 0.003828862)
          orientation_in_parent=(-1.57415 1.360169 -1.56793) location=(0 0 0) orientation=(-1.57415 1.360169 -1.56793)
        Coordinate R_wrist_flex-ext: motion_type=rotational default_value=0 range=(-1.74533 1.74533) clamped=true
        SpatialTransform: axes_held_at_zero=(rotation2 rotation3 translation1 translation2 translation3)
          TransformAxis rotation1: coordinates=R_wrist_flex-ext axis=(0 0 1) LinearFunction(coefficients=1 0)
      WrapCylinder Right_MTC_joint_wrapping_flex: xyz_body_rotation=(1.5 1.3 0)
          translation=(-0.0039946 -0.0262071 0.00262071) quadrant=all radius=0.002779542 length=0.04367852
      WrapCylinder Right_MTC_joint_wrapping_ext: xyz_body_rotation=(1.5 1.3 0)
          translation=(-0.0039946 -0.0265351 0.00279463) quadrant=all radius=0.002779542 length=0.04367852
    Body Right_manual_digits: mass=0.01811933 mass_center=(-0.00940705 -0.0179528 -0.00479832) inertia_xx=2.203481e-6
        inertia_yy=8.440402e-7 inertia_zz=2.584146e-6 inertia_xy=9.819381e-7 inertia_xz=2.624468e-7
        inertia_yz=5.008618e-7 meshes=Right_manual_digits.stl
      CustomJoint R_MCP_flex-ext: parent_body=Right_carpals_metacarpals
          location_in_parent=(-0.003994599 -0.0265351 0.002794631) orientation_in_parent=(-1.16235 -1.216238 1.979246)
          location=(0 0 0) orientation=(-1.16235 -1.216238 1.979246)
        Coordinate R_MCP_flex-ext: motion_type=rotational default_value=0 range=(-1.570796 1.570796) clamped=true
        SpatialTransform: axes_held_at_zero=(rotation2 rotation3 translation1 translation2 translation3)
          TransformAxis rotation1: coordinates=R_MCP_flex-ext axis=(0 0 1) LinearFunction(coefficients=1 0)
  ForceSet:
    Millard2012EquilibriumMuscle [values shared by the 26 below unless stated]: min_control=0 max_control=1
        pennation_angle_at_optimal=0 [radians] default_fiber_length=0.1 minimum_activation=0.01
      ActiveForceLengthCurve: min_norm_active_fiber_length=0.4441 transition_norm_fiber_length=0.73
          max_norm_active_fiber_length=1.8123 shallow_ascending_slope=0.8616 minimum_value=0
      ForceVelocityCurve: concentric_slope_at_vmax=0 concentric_slope_near_vmax=0.25 isometric_slope=5
          eccentric_slope_at_vmax=0 eccentric_slope_near_vmax=0.15 max_eccentric_velocity_force_multiplier=1.4
      FiberForceLengthCurve: strain_at_zero_force=0 strain_at_one_norm_force=0.6
      TendonForceLengthCurve: strain_at_one_norm_force=0.049
    Millard2012EquilibriumMuscle LDORa_right: max_isometric_force=667.4474 optimal_fiber_length=0.07569749
        tendon_slack_length=0.01520438
      PathPoint LDORa_right_origin: Thorax (-0.0222133 -0.0235972 0.0353206)
      PathPoint LDORa_right_via_1: Right_upper_arm (0.00636951 -0.0095837 0.00409807)
      PathPoint LDORa_right_insertion: Right_upper_arm (0.00709929 -0.0120029 -0.00433375)
      PathWrap: wrap_object=Right_shoulder_wrapping method=hybrid
    Millard2012EquilibriumMuscle LDORp_right: max_isometric_force=667.4474 optimal_fiber_length=0.07545656
        tendon_slack_length=0.01515599
      PathPoint LDORp_right_origin: Thorax (-0.0619044 -0.0235972 0.0353206)
      PathPoint LDORp_right_via_1: Thorax (-0.0384198 -0.0333232 0.0215225)
      PathPoint LDORp_right_via_2: Right_upper_arm (0.00494338 -0.0103627 0.00456171)
      PathPoint LDORp_right_insertion: Right_upper_arm (0.00709929 -0.0120029 -0.00433375)
      PathWrap: wrap_object=Right_shoulder_wrapping method=hybrid
    Millard2012EquilibriumMuscle PECTa_right: max_isometric_force=77.43153 optimal_fiber_length=0.05334316
        tendon_slack_length=0.01710247
      PathPoint PECTa_right_origin: Thorax (0.00976113 -0.0287638 0.000333978)
      PathPoint PECTa_right_insertion: Right_upper_arm (0.00512804 -0.0105301 -0.0167775)
      PathWrap: wrap_object=Right_shoulder_wrapping method=hybrid
      PathWrap: wrap_object=Right_DPC_wrapping method=hybrid
    Millard2012EquilibriumMuscle PECTm_right: max_isometric_force=289.8297 optimal_fiber_length=0.04992145
        tendon_slack_length=0.01134085
      PathPoint PECTm_right_origin: Thorax (-0.0185865 6.93565e-5 -0.00759187)
      PathPoint PECTm_right_insertion: Right_upper_arm (0.00455787 -0.0103316 -0.0166656)
      PathWrap: wrap_object=Right_shoulder_wrapping method=hybrid
      PathWrap: wrap_object=Right_DPC_wrapping method=hybrid
    Millard2012EquilibriumMuscle PECTp_right: max_isometric_force=285.8773 optimal_fiber_length=0.09064627
        tendon_slack_length=0.01699618
      PathPoint PECTp_right_origin: Thorax (-0.0540671 0 -0.0070893)
      PathPoint PECTp_right_insertion: Right_upper_arm (0.00428921 -0.011012 -0.0163635)
      PathWrap: wrap_object=Right_shoulder_wrapping method=hybrid
      PathWrap: wrap_object=Right_DPC_wrapping method=hybrid
    Millard2012EquilibriumMuscle BBa_right: max_isometric_force=40.18437 optimal_fiber_length=0.05084296
        tendon_slack_length=0.04519374
      PathPoint BBa_right_origin: Thorax (0.00735072 -0.0114886 -0.00320534)
      PathPoint BBa_right_via_1: Right_upper_arm (-0.00155806 -0.0081678 -0.0119085)
      PathPoint BBa_right_via_2: Right_upper_arm (-0.00292191 -0.0267049 -0.0112145)
      PathPoint BBa_right_via_3: Right_upper_arm (-0.00131087 -0.0482868 -0.00755644)
      PathPoint BBa_right_insertion: Right_ulna (0.00512808 -0.0150694 -0.000493492)
      PathWrap: wrap_object=Right_shoulder_wrapping method=hybrid
      PathWrap: wrap_object=Right_DPC_wrapping method=hybrid
      PathWrap: wrap_object=Right_elbow_wrapping method=hybrid
    Millard2012EquilibriumMuscle BBp_right: max_isometric_force=95.68748 optimal_fiber_length=0.03746079
        tendon_slack_length=0.064705
      PathPoint BBp_right_origin: Thorax (-0.0108452 -0.0114886 -0.00661341)
      PathPoint BBp_right_via_1: Right_upper_arm (-0.00353422 -0.00916426 -0.0124858)
      PathPoint BBp_right_via_2: Right_upper_arm (-0.00460251 -0.0267049 -0.0112145)
      PathPoint BBp_right_via_3: Right_upper_arm (-0.00263271 -0.0482615 -0.00775864)
      PathPoint BBp_right_insertion: Right_ulna (0.00399689 -0.0150098 -0.000968461)
      PathWrap: wrap_object=Right_shoulder_wrapping method=hybrid
      PathWrap: wrap_object=Right_DPC_wrapping method=hybrid
      PathWrap: wrap_object=Right_elbow_wrapping method=hybrid
    Millard2012EquilibriumMuscle BRAC_right: max_isometric_force=125.0772 optimal_fiber_length=0.05519475
        tendon_slack_length=0.007950392
      PathPoint BRAC_right_origin: Right_upper_arm (0.00553067 -0.0248069 -0.0058303)
      PathPoint BRAC_right_via_1: Right_upper_arm (0.00774327 -0.0486862 -0.00483753)
      PathPoint BRAC_right_insertion: Right_radius (0.00158103 0.0244854 -0.00622885)
      PathWrap: wrap_object=Right_elbow_wrapping method=hybrid
    Millard2012EquilibriumMuscle COBRlo_right: max_isometric_force=97.94745 optimal_fiber_length=0.07356579
        tendon_slack_length=0.01281828
      PathPoint COBRlo_right_origin: Thorax (-0.0247816 -0.0202916 -0.00384982)
      PathPoint COBRlo_right_via_1: Right_upper_arm (-0.0101445 -0.0134424 -0.000988981)
      PathPoint COBRlo_right_insertion: Right_upper_arm (-0.0126192 -0.057439 -9.91241e-5)
      PathWrap: wrap_object=Right_shoulder_wrapping method=hybrid
    Millard2012EquilibriumMuscle COBRbr_right: max_isometric_force=342.0891 optimal_fiber_length=0.03931428
        tendon_slack_length=0.01285359
      PathPoint COBRbr_right_origin: Thorax (-0.0169955 -0.0170948 -0.00543328)
      PathPoint COBRbr_right_insertion: Right_upper_arm (-0.00164794 -0.011985 -0.00705471)
      PathWrap: wrap_object=Right_shoulder_wrapping method=hybrid
    Millard2012EquilibriumMuscle SCOR_right: max_isometric_force=181.5666 optimal_fiber_length=0.06098679
        tendon_slack_length=0.006861014
      PathPoint SCOR_right_origin: Thorax (0.00242855 -0.0207024 0.00208176)
      PathPoint SCOR_right_insertion: Right_upper_arm (0.00668975 -0.00563881 -0.0155343)
      PathWrap: wrap_object=Right_shoulder_wrapping method=hybrid
    Millard2012EquilibriumMuscle DSCAP_right: max_isometric_force=140.9969 optimal_fiber_length=0.04159379
        tendon_slack_length=0.01219018
      PathPoint DSCAP_right_origin: Thorax (0.00973445 -0.0284383 0.0234457)
      PathPoint DSCAP_right_via_1: Thorax (0.00559119 -0.034782 0.0163815)
      PathPoint DSCAP_right_insertion: Right_upper_arm (0.00854157 -0.000802004 -0.00461941)
      PathWrap: wrap_object=Right_shoulder_wrapping method=hybrid
    Millard2012EquilibriumMuscle DCLAV_right: max_isometric_force=75.97948 optimal_fiber_length=0.06700577
        tendon_slack_length=0.007732253
      PathPoint DCLAV_right_origin: Thorax (0.012943 -0.0192 -0.00365242)
      PathPoint DCLAV_right_insertion: Right_upper_arm (0.00839383 -0.00560329 -0.00458305)
      PathWrap: wrap_object=Right_shoulder_wrapping method=hybrid
    Millard2012EquilibriumMuscle SHUMa_right: max_isometric_force=442.6472 optimal_fiber_length=0.03714573
        tendon_slack_length=0.01873206
      PathPoint SHUMa_right_origin: Thorax (0.00460527 -0.0303419 0.0127115)
      PathPoint SHUMa_right_via_1: Thorax (-0.000541979 -0.0351466 0.00974286)
      PathPoint SHUMa_right_insertion: Right_upper_arm (0.00520627 -0.00467122 -0.000188111)
      PathWrap: wrap_object=Right_shoulder_wrapping method=hybrid
    Millard2012EquilibriumMuscle SHUMp_right: max_isometric_force=363.2454 optimal_fiber_length=0.02867946
        tendon_slack_length=0.008858766
      PathPoint SHUMp_right_origin: Thorax (-0.00411978 -0.0354444 0.0154708)
      PathPoint SHUMp_right_insertion: Right_upper_arm (-0.000715271 -0.0034164 0.00315845)
      PathWrap: wrap_object=Right_shoulder_wrapping method=hybrid
    Millard2012EquilibriumMuscle SBCS_right: max_isometric_force=177.9291 optimal_fiber_length=0.02904517
        tendon_slack_length=0.008971732
      PathPoint SBCS_right_origin: Thorax (-0.0047792 -0.0314228 0.0138009)
      PathPoint SBCS_right_via_1: Thorax (-0.0112144 -0.0315471 0.0125882)
      PathPoint SBCS_right_insertion: Right_upper_arm (-0.00758863 0.00276308 0.00585283)
      PathWrap: wrap_object=Right_shoulder_wrapping method=hybrid
    Millard2012EquilibriumMuscle TRIlat_right: max_isometric_force=138.0923 optimal_fiber_length=0.02906079
        tendon_slack_length=0.01768238
      PathPoint TRIlat_right_origin: Right_upper_arm (0.00554081 -0.0273346 -0.000835796)
      PathPoint TRIlat_right_via_1: Right_upper_arm (0.00608054 -0.0353451 0.00369491)
      PathPoint TRIlat_right_via_2: Right_upper_arm (0.00421119 -0.0504351 0.00690312)
      PathPoint TRIlat_right_insertion: Right_ulna (0.00214993 0.00373096 0.0101344)
      PathWrap: wrap_object=Right_elbow_wrapping method=hybrid
    Millard2012EquilibriumMuscle TRIlo_right: max_isometric_force=477.2673 optimal_fiber_length=0.03567172
        tendon_slack_length=0.02563905
      PathPoint TRIlo_right_origin: Thorax (-0.00407283 -0.0346655 0.0120787)
      PathPoint TRIlo_right_via_1: Right_upper_arm (0.00948719 -0.0179635 0.00884891)
      PathPoint TRIlo_right_via_2: Right_upper_arm (0.00136097 -0.0432421 0.00787361)
      PathPoint TRIlo_right_insertion: Right_ulna (-0.00034002 0.00407759 0.0102734)
      PathWrap: wrap_object=Right_elbow_wrapping method=hybrid
    Millard2012EquilibriumMuscle TRImed_right: max_isometric_force=78.02307 optimal_fiber_length=0.03018042
        tendon_slack_length=0.01768349
      PathPoint TRImed_right_origin: Right_upper_arm (-0.00165132 -0.0295198 -0.00187885)
      PathPoint TRImed_right_via_1: Right_upper_arm (-0.0028134 -0.037129 0.00320915)
      PathPoint TRImed_right_via_2: Right_upper_arm (-0.00242155 -0.0501429 0.00691597)
      PathPoint TRImed_right_insertion: Right_ulna (-0.00206923 0.00360395 0.0094081)
      PathWrap: wrap_object=Right_elbow_wrapping method=hybrid
    Millard2012EquilibriumMuscle ECR_right: max_isometric_force=108.8933 optimal_fiber_length=0.06937931
        tendon_slack_length=0
      PathPoint ECR_right_origin: Right_upper_arm (0.0116482 -0.0467348 0.00206696)
      PathPoint ECR_right_via_1: Right_upper_arm (0.0145605 -0.0528288 0.00203774)
      PathPoint ECR_right_via_2: Right_radius (0.00881198 0.012964 0.00309705)
      PathPoint ECR_right_insertion: Right_radius (0.0118914 -0.0021367 0.00350075)
      PathWrap: wrap_object=Right_elbow_wrapping method=hybrid
    Millard2012EquilibriumMuscle ECU_right: max_isometric_force=74.03146 optimal_fiber_length=0.07000242
        tendon_slack_length=0
      PathPoint ECU_right_origin: Right_upper_arm (0.0116538 -0.0624651 0.00412942)
      PathPoint ECU_right_via_1: Right_upper_arm (0.012051 -0.0665761 0.00294102)
      PathPoint ECU_right_via_2: Right_ulna (0.00963843 -0.019123 0.0113755)
      PathPoint ECU_right_via_3: Right_ulna (0.0187051 -0.0568396 0.00699469)
      PathPoint ECU_right_via_3: Right_carpals_metacarpals (-0.00499023 -0.00238246 0.00635324)
      PathPoint ECU_right_insertion: Right_carpals_metacarpals (-0.00305361 -0.00650129 0.00447162)
      PathWrap: wrap_object=Right_wrist_wrapping_ext method=hybrid
    Millard2012EquilibriumMuscle EDL_right: max_isometric_force=81.46783 optimal_fiber_length=0.06291026
        tendon_slack_length=0
      PathPoint EDL_right_origin: Right_upper_arm (0.0117451 -0.0558474 0.00266621)
      PathPoint EDL_right_via_1: Right_radius (0.00452502 0.00993288 0.00868476)
      PathPoint EDL_right_via_1: Right_radius (0.00899653 -0.0200733 0.00943326)
      PathPoint EDL_right_via_1: Right_carpals_metacarpals (-9.39287e-5 -0.00492307 0.006003)
      PathPoint EDL_right_via_1: Right_carpals_metacarpals (-0.000202124 -0.0243069 0.00580593)
      PathPoint EDL_right_insertion: Right_manual_digits (0.00206614 -0.00382879 0.00311647)
      PathPoint P7: Right_manual_digits (0.000962608 -0.00861418 0.00238808)
      PathWrap: wrap_object=Right_elbow_wrapping method=hybrid
      PathWrap: wrap_object=Right_wrist_wrapping_ext method=hybrid
      PathWrap: wrap_object=Right_MTC_joint_wrapping_ext method=hybrid
    Millard2012EquilibriumMuscle PRON_right: max_isometric_force=780.7722 optimal_fiber_length=0.04366014
        tendon_slack_length=0
      PathPoint PRON_right_origin: Right_ulna (0.0109746 -0.0384884 0.00518233)
      PathPoint PRON_right_insertion: Right_radius (0.0169388 -0.0267332 0.00716688)
    Millard2012EquilibriumMuscle FCR_right: max_isometric_force=71.18378 optimal_fiber_length=0.06441991
        tendon_slack_length=0
      PathPoint FCR_right_origin: Right_upper_arm (-0.0136363 -0.0591624 -0.000435921)
      PathPoint FCR_right_via_1: Right_upper_arm (-0.0130285 -0.0593684 -0.00235999)
      PathPoint FCR_right_insertion: Right_radius (0.0178213 -0.0264461 0.000318851)
      PathWrap: wrap_object=Right_elbow_wrapping_small method=hybrid
    Millard2012EquilibriumMuscle FCU_right: max_isometric_force=263.8383 optimal_fiber_length=0.07202163
        tendon_slack_length=0
      PathPoint FCU_right_origin: Right_upper_arm (-0.0146895 -0.064621 -6.64582e-5)
      PathPoint FCU_right_insertion: Right_ulna (0.0140414 -0.0704833 0.00173847)
      PathWrap: wrap_object=Right_elbow_wrapping_small method=hybrid
    Millard2012EquilibriumMuscle FDL_right: max_isometric_force=114.2252 optimal_fiber_length=0.06191686
        tendon_slack_length=0
      PathPoint FDL_right_origin: Right_upper_arm (-0.0146771 -0.0620044 -0.000459575)
      PathPoint FDL_right_via_1: Right_upper_arm (-0.0150742 -0.0627691 -0.00335991)
      PathPoint FDL_right_via_2: Right_radius (0.00684385 -0.0257633 -0.00414822)
      PathPoint FDL_right_via_3: Right_carpals_metacarpals (-0.000180973 -0.00613613 -0.00288461)
      PathPoint FDL_right_via_4: Right_carpals_metacarpals (-0.00111639 -0.0240522 -0.000248073)
      PathPoint FDL_right_via_5: Right_manual_digits (0.00173571 -0.00391237 -0.00338335)
      PathPoint FDL_right_insertion: Right_manual_digits (0.000444387 -0.0081969 -0.0020969)
      PathWrap: wrap_object=Right_elbow_wrapping_small method=hybrid
      PathWrap: wrap_object=Right_wrist_wrapping_flex method=axial
      PathWrap: wrap_object=Right_MTC_joint_wrapping_flex method=axial
  MarkerSet:
    Marker Caud_Neck: Thorax (0.0320107 0 0.058538)
    Marker Thorax: Thorax (-0.0154014 0 0.058538)
    Marker Spine_A: Thorax (-0.0533512 0 0.058538)
    Marker R_Shoulder: Thorax (-0.0118475 -0.0476106 0.0155227)
    Marker R_Elbow: Right_upper_arm (-0.00844053 -0.0687381 0.000541752)
    Marker R_Wrist: Right_radius (0.00436932 -0.0291339 0.0043759)
    Marker R_MCP: Right_carpals_metacarpals (-0.00975667 -0.0252936 0.00259387)
    Marker R_Finger: Right_manual_digits (-0.0160915 -0.0301176 -0.00224051)
