# OpenSim document version 30000
Model varius7_hind_splitGast_massScaled_extraRot:
  credits: Peter Bishop, Christofer Clemente, Taylor Dick
  length_units: meters
  force_units: N
  gravity: 0 0 -9.80665
  BodySet:
    Body ground: mass=0 mass_center=(0 0 0) inertia_xx=0 inertia_yy=0 inertia_zz=0
    Body Trunk: mass=3.126655 mass_center=(-0.00202165 0 -0.000789492) inertia_xx=0.001459536 inertia_yy=0.05602309
        inertia_zz=0.05602309 inertia_xy=-9.202819e-13 inertia_xz=9.686313e-14 inertia_yz=-6.739037e-12
        meshes=Pelvis_sacrum.stl
      CustomJoint TrunkToground: parent_body=ground location_in_parent=(0 0 0) location=(0 0 0)
        Coordinate Pelvis_pitch: motion_type=rotational default_value=0 range=(-0.785398 0.785398) clamped=true
        Coordinate Pelvis_roll: motion_type=rotational default_value=0 range=(-0.174533 0.174533) clamped=true
        Coordinate Pelvis_yaw: motion_type=rotational default_value=0 range=(-3.141593 3.141593) clamped=true
        Coordinate Pelvis_Tx: motion_type=translational default_value=0 range=(-2 2) clamped=true
        Coordinate Pelvis_Ty: motion_type=translational default_value=0 range=(-2 2) clamped=true
        Coordinate Pelvis_Tz: motion_type=translational default_value=0 range=(-2 2) clamped=true
        SpatialTransform:
          TransformAxis rotation1: coordinates=Pelvis_pitch axis=(0 1 0) LinearFunction(coefficients=1 0)
          TransformAxis rotation2: coordinates=Pelvis_roll axis=(1 0 0) LinearFunction(coefficients=1 0)
          TransformAxis rotation3: coordinates=Pelvis_yaw axis=(0 0 1) LinearFunction(coefficients=1 0)
          TransformAxis translation1: coordinates=Pelvis_Tx axis=(1 0 0) LinearFunction(coefficients=1 0)
          TransformAxis translation2: coordinates=Pelvis_Ty axis=(0 1 0) LinearFunction(coefficients=1 0)
          TransformAxis translation3: coordinates=Pelvis_Tz axis=(0 0 1) LinearFunction(coefficients=1 0)
    Body Left_thigh: mass=0.2598637 mass_center=(0.00219473 0.0432937 2.20149e-5) inertia_xx=0.0002072295
        inertia_yy=8.981606e-5 inertia_zz=0.0002075317 inertia_xy=5.967513e-6 inertia_xz=3.03399e-9
        inertia_yz=5.985728e-8 meshes=Left_femur.stl
      CustomJoint L_hip: parent_body=Trunk location_in_parent=(-0.001648868 0.03011437 0.0003849126) location=(0 0 0)
        Coordinate L_hip_flex-ext: motion_type=rotational default_value=0 range=(-1.570796 1.570796) clamped=true
        Coordinate L_hip_adb-add: motion_type=rotational default_value=0 range=(-1.570796 1.570796) clamped=true
        Coordinate L_hip_LAR: motion_type=rotational default_value=0 range=(-1.570796 2.35619) clamped=true
        SpatialTransform: axes_held_at_zero=(translation1 translation2 translation3)
          TransformAxis rotation1: coordinates=L_hip_flex-ext axis=(0 0 1) LinearFunction(coefficients=1 0)
          TransformAxis rotation2: coordinates=L_hip_adb-add axis=(1 0 0) LinearFunction(coefficients=1 0)
          TransformAxis rotation3: coordinates=L_hip_LAR axis=(0 1 0) LinearFunction(coefficients=1 0)
    Body Left_tibia: mass=0.06783566 mass_center=(0.0138635 0.0359677 0.00126275) inertia_xx=3.003704e-5
        inertia_yy=5.374071e-6 inertia_zz=3.127077e-5 inertia_xy=5.732311e-6 inertia_xz=2.061812e-7
        inertia_yz=9.326647e-7 meshes=Left_tibia.stl
      CustomJoint L_knee: parent_body=Left_thigh location_in_parent=(0.004388889 0.08658745 4.403988e-5)
          orientation_in_parent=(1.573436 1.222924 -1.57843) location=(0 0 0) orientation=(1.573436 1.222924 -1.57843)
        Coordinate L_knee_flex-ext: motion_type=rotational default_value=0 range=(-2.356194 0) clamped=true
        SpatialTransform: axes_held_at_zero=(rotation2 rotation3 translation1 translation2 translation3)
          TransformAxis rotation1: coordinates=L_knee_flex-ext axis=(0 0 1) LinearFunction(coefficients=1 0)
    Body Left_fibula_AC: mass=0.06783566 mass_center=(-0.00759517 0.00708719 0.000546163) inertia_xx=3.003704e-5
        inertia_yy=5.374071e-6 inertia_zz=3.127077e-5 inertia_xy=5.732311e-6 inertia_xz=2.061812e-7
        inertia_yz=9.326647e-7 meshes=(Left_fibula_1.stl Left_astragalocalcaneum_1.stl)
      CustomJoint L_tibia-fibula: parent_body=Left_tibia location_in_parent=(0.00559261 0.03284664 0.0007172928)
          orientation_in_parent=(0.041114 -0.01120023 -0.5315) location=(0 0 0)
          orientation=(0.041114 -0.01120023 -0.5315)
        Coordinate L_crus_pron-sup: motion_type=rotational default_value=0 range=(-0.785398 0.785398) clamped=true
        SpatialTransform: axes_held_at_zero=(rotation2 rotation3 translation1 translation2 translation3)
          TransformAxis rotation1: coordinates=L_crus_pron-sup axis=(0 1 0) LinearFunction(coefficients=1 0)
    Body Left_tarsals_metatarsus: mass=0.03973646 mass_center=(0.00305508 0.0196384 -0.00239876) inertia_xx=6.257446e-6
        inertia_yy=2.257308e-6 inertia_zz=6.295492e-6 inertia_xy=6.377201e-7 inertia_xz=-7.789549e-8
        inertia_yz=-5.007211e-7 meshes=Left_tarsals_metatarsals.stl
      CustomJoint L_ankle: parent_body=Left_fibula_AC location_in_parent=(0.009929441 0.03736744 0.001808735)
          orientation_in_parent=(0.278894 -1.359215 0.2114) location=(0 0 0) orientation=(0.278894 -1.359215 0.2114)
        Coordinate L_ankle_flex-ext: motion_type=rotational default_value=0 range=(-2.617994 0.523599) clamped=true
        SpatialTransform: axes_held_at_zero=(rotation2 rotation3 translation1 translation2 translation3)
          TransformAxis rotation1: coordinates=L_ankle_flex-ext axis=(0 0 1) LinearFunction(coefficients=1 0)
    Body Left_pedal_digits: mass=0.01390094 mass_center=(0.00684965 0.0213032 -0.00132693) inertia_xx=2.157658e-6
        inertia_yy=3.067287e-7 inertia_zz=2.363066e-6 inertia_xy=6.637549e-7 inertia_xz=-4.134393e-8
        inertia_yz=-1.28584e-7 meshes=Left_pedal_digits.stl
      CustomJoint L_MTP_flex-ext: parent_body=Left_tarsals_metatarsus
          location_in_parent=(0.0061107 0.03927723 -0.004797858) orientation_in_parent=(0.661024 1.212798 -0.42607)
          location=(0 0 0) orientation=(0.661024 1.212798 -0.42607)
        Coordinate L_MTP_flex-ext: motion_type=rotational default_value=0 range=(-1.570796 1.570796) clamped=true
        SpatialTransform: axes_held_at_zero=(rotation2 rotation3 translation1 translation2 translation3)
          TransformAxis rotation1: coordinates=L_MTP_flex-ext axis=(0 0 1) LinearFunction(coefficients=1 0)
    Body Right_thigh: mass=0.2598637 mass_center=(0.00219473 -0.0432937 2.20149e-5) inertia_xx=0.0002072295
        inertia_yy=8.981606e-5 inertia_zz=0.0002075322 inertia_xy=-5.967513e-6 inertia_xz=3.03496e-9
        inertia_yz=-5.985903e-8 meshes=Right_femur.stl
      CustomJoint R_hip: parent_body=Trunk location_in_parent=(-0.001648868 -0.0309966 0.0003849126)
          orientation_in_parent=(-3.14159 0 -3.14159) location=(0 0 0) orientation=(-3.14159 0 -3.14159)
        Coordinate R_hip_flex-ext: motion_type=rotational default_value=0 range=(-1.570796 1.570796) clamped=true
        Coordinate R_hip_adb-add: motion_type=rotational default_value=0 range=(-1.570796 1.570796) clamped=true
        Coordinate R_hip_LAR: motion_type=rotational default_value=0 range=(-2 2) clamped=true
        SpatialTransform: axes_held_at_zero=(translation1 translation2 translation3)
          TransformAxis rotation1: coordinates=R_hip_flex-ext axis=(0 0 1) LinearFunction(coefficients=1 0)
          TransformAxis rotation2: coordinates=R_hip_adb-add axis=(1 0 0) LinearFunction(coefficients=1 0)
          TransformAxis rotation3: coordinates=R_hip_LAR axis=(0 1 0) LinearFunction(coefficients=1 0)
      WrapEllipsoid Right_hip_wrapping: xyz_body_rotation=(0 -0.6 0) translation=(0 0 0) quadrant=all
          dimensions=(0.0100663 0.0100663 0.00880798)
      WrapEllipsoid Right_knee_wrapping: xyz_body_rotation=(0 0 0.3) translation=(0.00377485 -0.0830466 0.00125828)
          quadrant=all dimensions=(0.0188742 0.0125828 0.0100663)
    Body Right_tibia: mass=0.06783566 mass_center=(0.0138635 -0.0351072 0.00126275) inertia_xx=3.003704e-5
        inertia_yy=5.374071e-6 inertia_zz=3.127077e-5 inertia_xy=-5.732311e-6 inertia_xz=2.061812e-7
        inertia_yz=-9.326647e-7 meshes=Right_tibia.stl
      CustomJoint R_knee: parent_body=Right_thigh location_in_parent=(0.004388889 -0.08658745 4.403988e-5)
          orientation_in_parent=(1.568155 -1.222924 1.563167) location=(0 0 0)
          orientation=(1.568155 -1.222924 1.563167)
        Coordinate R_knee_flex-ext: motion_type=rotational default_value=0 range=(-2.356194 0) clamped=true
        SpatialTransform: axes_held_at_zero=(rotation2 rotation3 translation1 translation2 translation3)
          TransformAxis rotation1: coordinates=R_knee_flex-ext axis=(0 0 1) LinearFunction(coefficients=1 0)
    Body Right_fibula_AC: mass=0.06783566 mass_center=(-0.00759517 -0.00622674 0.000546163) inertia_xx=3.003704e-5
        inertia_yy=5.374071e-6 inertia_zz=3.127077e-5 inertia_xy=-5.732311e-6 inertia_xz=2.061812e-7
        inertia_yz=-9.326647e-7 meshes=(Right_fibula_1.stl Right_astragalocalcaneum_1.stl)
      CustomJoint R_tibia-fibula: parent_body=Right_tibia location_in_parent=(0.00559261 -0.03284767 0.0007172928)
          orientation_in_parent=(-0.04111 -0.01120023 0.531755) location=(0 0 0)
          orientation=(-0.04111 -0.01120023 0.531755)
        Coordinate R_crus_pron-sup: motion_type=rotational default_value=0 range=(-3 3) clamped=true
        SpatialTransform: axes_held_at_zero=(rotation2 rotation3 translation1 translation2 translation3)
          TransformAxis rotation1: coordinates=R_crus_pron-sup axis=(0 1 0) LinearFunction(coefficients=1 0)
      WrapCylinder Right_ankle_wrapping: xyz_body_rotation=(0 1.6 0) translation=(0.00930207 -0.0361747 0.00103356)
          quadrant=all radius=0.008268505 length=0.05684597
    Body Right_tarsals_metatarsus: mass=0.03973646 mass_center=(0.00305508 -0.0196384 -0.00239876)
        inertia_xx=6.257446e-6 inertia_yy=2.257308e-6 inertia_zz=6.295492e-6 inertia_xy=-6.377201e-7
        inertia_xz=-7.789549e-8 inertia_yz=5.007211e-7 meshes=Right_tarsals_metatarsals.stl
      CustomJoint R_ankle: parent_body=Right_fibula_AC location_in_parent=(0.009929441 -0.03736744 0.001808735)
          orientation_in_parent=(2.862699 1.359215 0.2114) location=(0 0 0) orientation=(2.862699 1.359215 0.2114)
        Coordinate R_ankle_flex-ext: motion_type=rotational default_value=0 range=(-3.3 1.95) clamped=true
        SpatialTransform: axes_held_at_zero=(rotation2 rotation3 translation1 translation2 translation3)
          TransformAxis rotation1: coordinates=R_ankle_flex-ext axis=(0 0 1) LinearFunction(coefficients=1 0)
      WrapCylinder Right_MTP_joint_wrapping_flex: xyz_body_rotation=(-0.7 1.25 0)
          translation=(0.00875877 -0.0389279 -0.00194639) quadrant=all radius=0.004865982 length=0.0535258
      WrapCylinder Right_MTP_joint_wrapping_ext: xyz_body_rotation=(-0.7 1.25 0)
          translation=(0.00875877 -0.0369815 -0.00486598) quadrant=all radius=0.005839178 length=0.0535258
    Body Right_pedal_digits: mass=0.01390094 mass_center=(0.00685764 -0.0213028 -0.00129013) inertia_xx=2.157157e-6
        inertia_yy=3.067881e-7 inertia_zz=2.363513e-6 inertia_xy=-6.645188e-7 inertia_xz=-4.024414e-8
        inertia_yz=1.250161e-7 meshes=Right_pedal_digits.stl
      CustomJoint R_MTP_flex-ext: parent_body=Right_tarsals_metatarsus
          location_in_parent=(0.0061107 -0.03927626 -0.004797858) orientation_in_parent=(2.480549 -1.125307 -0.42607)
          location=(0 0 0) orientation=(2.480549 -1.125307 -0.42607)
        Coordinate R_MTP_flex-ext: motion_type=rotational default_value=0 range=(-1.570796 1.570796) clamped=true
        SpatialTransform: axes_held_at_zero=(rotation2 rotation3 translation1 translation2 translation3)
          TransformAxis rotation1: coordinates=R_MTP_flex-ext axis=(0 0 1) LinearFunction(coefficients=1 0)
  ForceSet:
    Millard2012EquilibriumMuscle [values shared by the 23 below unless stated]: min_control=0 max_control=1
        pennation_angle_at_optimal=0 [radians] default_fiber_length=0.1 minimum_activation=0.01
      ActiveForceLengthCurve: min_norm_active_fiber_length=0.4441 transition_norm_fiber_length=0.73
          max_norm_active_fiber_length=1.8123 shallow_ascending_slope=0.8616 minimum_value=0
      ForceVelocityCurve: concentric_slope_at_vmax=0 concentric_slope_near_vmax=0.25 isometric_slope=5
          eccentric_slope_at_vmax=0 eccentric_slope_near_vmax=0.15 max_eccentric_velocity_force_multiplier=1.4
      FiberForceLengthCurve: strain_at_zero_force=0 strain_at_one_norm_force=0.6
      TendonForceLengthCurve: strain_at_one_norm_force=0.049
    Millard2012EquilibriumMuscle ILTIB_right: max_isometric_force=74.07511 optimal_fiber_length=0.0661798
        tendon_slack_length=0.04534542
      PathPoint ILTIB_right_origin: Trunk (-0.0118008 -0.0248168 0.021799)
      PathPoint ILTIB_right_via_1: Right_thigh (0.00408942 -0.0830479 0.016296)
      PathPoint ILTIB_right_insertion: Right_tibia (0.00154931 -0.00715019 0.0123356)
      PathWrap: wrap_object=Right_knee_wrapping method=hybrid
    Millard2012EquilibriumMuscle AMBd_right: max_isometric_force=95.40333 optimal_fiber_length=0.0754396
        tendon_slack_length=0.038655
      PathPoint AMBd_right_origin: Trunk (0.00985185 -0.0320644 0.000620314)
      PathPoint AMBd_right_via_1: Right_thigh (0.0108892 -0.0833486 0.0113006)
      PathPoint AMBd_right_insertion: Right_tibia (0.00508203 -0.00497867 0.0102716)
      PathWrap: wrap_object=Right_hip_wrapping method=hybrid
      PathWrap: wrap_object=Right_knee_wrapping method=hybrid
    Millard2012EquilibriumMuscle AMBv_right: max_isometric_force=198.265 optimal_fiber_length=0.07272742
        tendon_slack_length=0.03574737
      PathPoint AMBv_right_origin: Trunk (0.0036466 -0.0236536 -0.00298281)
      PathPoint AMBv_right_via_1: Right_thigh (0.0106344 -0.00975861 -0.00302221)
      PathPoint AMBv_right_via_2: Right_thigh (0.00787811 -0.0830781 0.0121374)
      PathPoint AMBv_right_insertion: Right_tibia (0.00300767 -0.00528254 0.0113682)
      PathWrap: wrap_object=Right_hip_wrapping method=hybrid
      PathWrap: wrap_object=Right_knee_wrapping method=hybrid
    Millard2012EquilibriumMuscle FTIB_right: max_isometric_force=174.3475 optimal_fiber_length=0.03696483
        tendon_slack_length=0.02020744
      PathPoint FTIB_right_origin: Right_thigh (-0.00297835 -0.0300742 0.000948745)
      PathPoint FTIB_right_via_1: Right_thigh (-0.00277451 -0.0400952 0.00470849)
      PathPoint FTIB_right_via_2: Right_thigh (0.00502432 -0.0830756 0.0121915)
      PathPoint FTIB_right_insertion: Right_tibia (0.00202992 -0.00543034 0.011426)
      PathWrap: wrap_object=Right_knee_wrapping method=hybrid
    Millard2012EquilibriumMuscle ILFEM_right: max_isometric_force=56.71399 optimal_fiber_length=0.04829034
        tendon_slack_length=0
      PathPoint ILFEM_right_origin: Trunk (-0.00350027 -0.0294304 0.0157782)
      PathPoint ILFEM_right_via_1: Right_thigh (-0.00847202 -0.00872619 -0.00370187)
      PathPoint ILFEM_right_insertion: Right_thigh (-0.00689413 -0.0102361 -0.0059328)
      PathWrap: wrap_object=Right_hip_wrapping method=hybrid
    Millard2012EquilibriumMuscle AFEM_right: max_isometric_force=106.6484 optimal_fiber_length=0.06586298
        tendon_slack_length=0
      PathPoint AFEM_right_origin: Trunk (0.00686587 -0.0145768 -0.0143807)
      PathPoint AFEM_right_via_1: Right_thigh (0.00514889 -0.0278269 -0.0153385)
      PathPoint AFEM_right_insertion: Right_thigh (0.00189497 -0.0446124 -0.00595293)
    Millard2012EquilibriumMuscle PIFE_right: max_isometric_force=132.8709 optimal_fiber_length=0.05118367
        tendon_slack_length=0.004762307
      PathPoint PIFE_right_origin: Trunk (-0.00663577 -0.0110214 -0.00890071)
      PathPoint PIFE_right_insertion: Right_thigh (0.00700737 -0.00435366 -0.0129364)
      PathWrap: wrap_object=Right_hip_wrapping method=hybrid
    Millard2012EquilibriumMuscle PIFI_right: max_isometric_force=132.8709 optimal_fiber_length=0.05111364
        tendon_slack_length=0.004755791
      PathPoint PIFI_right_origin: Trunk (0.0188681 -0.0200324 -0.00578005)
      PathPoint PIFI_right_via_1: Trunk (0.0182626 -0.0252152 -0.000761697)
      PathPoint PIFI_right_via_2: Trunk (0.00944771 -0.0337998 0.00545124)
      PathPoint PIFI_right_insertion: Right_thigh (-0.000968877 -0.0160444 0.00154391)
      PathWrap: wrap_object=Right_hip_wrapping method=hybrid
    Millard2012EquilibriumMuscle PIT_right: max_isometric_force=135.1759 optimal_fiber_length=0.1082127
        tendon_slack_length=0.01174881
      PathPoint PIT_right_origin: Trunk (-0.00197864 -0.00780959 -0.0167114)
      PathPoint PIT_right_via_1: Right_thigh (0.00935242 -0.0145764 -0.0195991)
      PathPoint PIT_right_via_2: Right_thigh (0.0119907 -0.0644409 -0.00886739)
      PathPoint PIT_right_via_3: Right_tibia (0.013243 -0.00978784 -0.0022604)
      PathPoint PIT_right_insertion: Right_tibia (0.0123232 -0.0130952 -0.00094571)
      PathWrap: wrap_object=Right_knee_wrapping method=hybrid
    Millard2012EquilibriumMuscle PTIB_right: max_isometric_force=109.3541 optimal_fiber_length=0.07096056
        tendon_slack_length=0.02303106
      PathPoint PTIB_right_origin: Trunk (0.011102 -0.0317579 0.00127986)
      PathPoint PTIB_right_via_1: Right_thigh (0.0143552 -0.00866994 -0.00597513)
      PathPoint PTIB_right_insertion: Right_tibia (0.00391204 -0.00855377 -0.00206919)
      PathWrap: wrap_object=Right_knee_wrapping method=hybrid
    Millard2012EquilibriumMuscle FTE_right: max_isometric_force=159.4617 optimal_fiber_length=0.08451288
        tendon_slack_length=0.02758742
      PathPoint FTE_right_origin: Trunk (-0.0230534 -0.0153626 -0.00122048)
      PathPoint FTE_right_via_1: Right_thigh (-0.00904202 -0.0478802 -0.00672174)
      PathPoint FTE_right_insertion: Right_tibia (0.0013674 -0.00892482 -0.00232448)
      PathWrap: wrap_object=Right_knee_wrapping method=hybrid
    Millard2012EquilibriumMuscle FTId_right: max_isometric_force=37.26485 optimal_fiber_length=0.1023761
        tendon_slack_length=0.01535642
      PathPoint FTId_right_origin: Trunk (-0.0171599 -0.00386503 -0.0143361)
      PathPoint FTId_right_via_1: Right_thigh (-0.00210133 -0.0549454 -0.0131629)
      PathPoint FTId_right_insertion: Right_tibia (0.00764733 -0.00804526 -0.00256427)
      PathWrap: wrap_object=Right_knee_wrapping method=hybrid
    Millard2012EquilibriumMuscle FTIs_right: max_isometric_force=114.4817 optimal_fiber_length=0.08404126
        tendon_slack_length=0.01800884
      PathPoint FTIs_right_origin: Trunk (-0.0248274 -0.011084 -0.0070737)
      PathPoint FTIs_right_via_1: Right_thigh (-0.00655943 -0.0582899 -0.0121449)
      PathPoint FTIs_right_insertion: Right_tibia (0.0055492 -0.00776103 -0.00199064)
      PathWrap: wrap_object=Right_knee_wrapping method=hybrid
    Millard2012EquilibriumMuscle ILFIB_right: max_isometric_force=78.06671 optimal_fiber_length=0.07097398
        tendon_slack_length=0.02327457
      PathPoint ILFIB_right_origin: Trunk (-0.0185543 -0.0229696 0.0198797)
      PathPoint ILFIB_right_via_1: Right_fibula_AC (-0.0180026 0.0241089 -0.000898166)
      PathPoint ILFIB_right_insertion: Right_fibula_AC (-0.0157949 0.0204997 -0.00112038)
      PathWrap: wrap_object=Right_knee_wrapping method=hybrid
    Millard2012EquilibriumMuscle CFEML_right: max_isometric_force=720.6523 optimal_fiber_length=0.05819245
        tendon_slack_length=0.03626597
      PathPoint CFEML_right_origin: Trunk (-0.0673777 -0.0164208 0.0140657)
      PathPoint CFEML_right_via_1: Trunk (-0.0269704 -0.0262281 0.00502825)
      PathPoint CFEML_right_via_2: Right_thigh (-0.00508346 -0.0129213 -0.0108665)
      PathPoint CFEML_right_insertion: Right_thigh (0.00314696 -0.0159374 -0.0133604)
      PathWrap: wrap_object=Right_hip_wrapping method=hybrid
      PathWrap: wrap_object=Right_knee_wrapping method=hybrid
    Millard2012EquilibriumMuscle CFEMB_right: max_isometric_force=523.6367 optimal_fiber_length=0.04582614
        tendon_slack_length=0
      PathPoint CFEMB_right_origin: Trunk (-0.0299034 -0.0163943 0.0156425)
      PathPoint CFEMB_right_via_1: Right_thigh (-0.00717473 -0.00525836 -0.00843427)
      PathPoint CFEMB_right_insertion: Right_thigh (0.00335961 -0.0106363 -0.012379)
      PathWrap: wrap_object=Right_hip_wrapping method=hybrid
      PathWrap: wrap_object=Right_knee_wrapping method=hybrid
    Millard2012EquilibriumMuscle femGAST_right: max_isometric_force=445.6613 optimal_fiber_length=0.06683664
        tendon_slack_length=0.02734226
      PathPoint femGAST_right_origin: Right_thigh (-0.00393213 -0.0729678 -0.00248133)
      PathPoint femGAST_right_via_1: Right_fibula_AC (0.000706527 -0.00664735 -0.00216861)
      PathPoint femGAST_right_via_2: Right_fibula_AC (0.00524335 -0.0290297 -0.00743507)
      PathPoint femGAST_right_via_3: Right_tarsals_metatarsus (-0.0023615 0.00194639 -0.00772788)
      PathPoint femGAST_right_via_4: Right_tarsals_metatarsus (0.00692149 -0.0211266 -0.00869255)
      PathPoint femGAST_right_via_5: Right_tarsals_metatarsus (0.010929 -0.0327153 -0.00727851)
      PathPoint femGAST_right_via_6: Right_pedal_digits (0.005073 -0.00260148 -0.002015)
      PathPoint femGAST_right_insertion: Right_pedal_digits (0.00627066 -0.00706813 -0.0015667)
      PathWrap: wrap_object=Right_knee_wrapping method=axial
      PathWrap: wrap_object=Right_ankle_wrapping method=axial
      PathWrap: wrap_object=Right_MTP_joint_wrapping_flex method=axial
    Millard2012EquilibriumMuscle tibGAST_right: max_isometric_force=445.6613 optimal_fiber_length=0.06774311
        tendon_slack_length=0.02771309
      PathPoint tibGAST_right_origin: Right_tibia (0.0121113 -0.0176264 -0.000920905)
      PathPoint tibGAST_right_via_1: Right_fibula_AC (0.0114981 -0.0306779 -0.00755959)
      PathPoint tibGAST_right_via_2: Right_tarsals_metatarsus (0.000973196 0.00389279 -0.00778557)
      PathPoint tibGAST_right_via_3: Right_tarsals_metatarsus (0.000973196 -0.00194639 -0.00778557)
      PathPoint tibGAST_right_insertion: Right_tarsals_metatarsus (0.00194639 -0.00973196 -0.00486598)
      PathWrap: wrap_object=Right_knee_wrapping method=axial
      PathWrap: wrap_object=Right_ankle_wrapping method=axial
    Millard2012EquilibriumMuscle PLONG_right: max_isometric_force=81.48686 optimal_fiber_length=0.04234641
        tendon_slack_length=0.04647776
      PathPoint PLONG_right_origin: Right_thigh (-0.00924838 -0.0844157 0.00309412)
      PathPoint PLONG_right_via_1: Right_fibula_AC (-0.0194129 0.0270197 0.00250188)
      PathPoint PLONG_right)_via_2: Right_fibula_AC (-0.0061191 -0.0278993 -0.00969745)
      PathPoint PLONG_right_via_3: Right_tarsals_metatarsus (-0.0124925 0.00422534 -0.0121374)
      PathPoint PLONG_right_insertion: Right_tarsals_metatarsus (-0.00953538 -0.00196002 -0.0155342)
      PathWrap: wrap_object=Right_ankle_wrapping method=axial
    Millard2012EquilibriumMuscle PBREV_right: max_isometric_force=79.34827 optimal_fiber_length=0.05322624
        tendon_slack_length=0.03130955
      PathPoint PBREV_right_origin: Right_fibula_AC (-0.00741375 -0.00642359 0.00223456)
      PathPoint PBREV_right_via_1: Right_fibula_AC (-0.00952738 -0.0127366 -0.00073383)
      PathPoint PBREV_right_via_2: Right_fibula_AC (-0.00497499 -0.0267723 -0.00580224)
      PathPoint PBREV_right_via_3: Right_tarsals_metatarsus (-0.0132391 0.00747804 -0.00800569)
      PathPoint PBREV_right_insertion: Right_tarsals_metatarsus (-0.0121397 0.00234443 -0.00828287)
      PathWrap: wrap_object=Right_ankle_wrapping method=axial
    Millard2012EquilibriumMuscle TIBA_right: max_isometric_force=46.8292 optimal_fiber_length=0.05816419
        tendon_slack_length=0.02959231
      PathPoint TIBA_right_origin: Right_tibia (0.0126891 -0.0205875 0.00742822)
      PathPoint TIBA_right_via_1: Right_tibia (0.0231003 -0.0375367 0.00741667)
      PathPoint TIBA_right_via_2: Right_fibula_AC (0.0227584 -0.0266731 0.00981143)
      PathPoint TIBA_right_via_3: Right_tarsals_metatarsus (0.0151696 -0.0073217 0.00270333)
      PathPoint TIBA_right_insertion: Right_tarsals_metatarsus (0.0156295 -0.00826341 -0.00267726)
    Millard2012EquilibriumMuscle EDL_right: max_isometric_force=50.04838 optimal_fiber_length=0.05189192
        tendon_slack_length=0.02694388
      PathPoint EDL_right_origin: Right_thigh (-0.00734082 -0.0879879 0.00437505)
      PathPoint EDL_right_via_1: Right_fibula_AC (-0.0109699 0.00781267 0.00797198)
      PathPoint EDL_right_via_2: Right_fibula_AC (0.00170979 -0.0296297 0.00818062)
      PathPoint EDL_right_via_3: Right_tarsals_metatarsus (-0.00393991 -0.0135169 0.00178418)
      PathPoint EDL_right_via_4: Right_tarsals_metatarsus (0.00510446 -0.0335302 0.000574109)
      PathPoint EDL_right_insertion: Right_pedal_digits (0.00364306 -0.00327624 0.00359406)
      PathWrap: wrap_object=Right_MTP_joint_wrapping_ext method=hybrid
    Millard2012EquilibriumMuscle FDL_right: max_isometric_force=152.2207 optimal_fiber_length=0.05742122
        tendon_slack_length=0.0161545
      PathPoint FDL_right_origin: Right_thigh (-0.00377485 -0.0729804 -0.00251656)
      PathPoint FDL_right_via_1: Right_fibula_AC (0.00103356 -0.00620138 -0.00206713)
      PathPoint P3: Right_fibula_AC (0.00516782 -0.0289398 -0.00723494)
      PathPoint FDL_right_via_2: Right_tarsals_metatarsus (-0.00194639 0.00194639 -0.00778557)
      PathPoint P5: Right_tarsals_metatarsus (0.00875877 -0.0330887 -0.00778557)
      PathPoint FDL_right_via_3: Right_pedal_digits (0.0037379 -0.00307929 -0.00289634)
      PathPoint FDL_right_via_4: Right_pedal_digits (0.00827831 -0.0145875 -0.00147105)
      PathPoint FDL_right_insertion: Right_pedal_digits (0.0132093 -0.0252557 -0.00508307)
      PathWrap: wrap_object=Right_knee_wrapping method=axial
      PathWrap: wrap_object=Right_ankle_wrapping method=axial
      PathWrap: wrap_object=Right_MTP_joint_wrapping_flex method=axial
  MarkerSet:
    Marker Lumbar: Trunk (0.0248603 0 0.0371128)
    Marker Caudal: Trunk (-0.028158 0 0.0371128)
    Marker Stick: Trunk (-0.00164887 0 0.066803)
    Marker R_Hip: Trunk (1.54111e-5 -0.0316899 0.0144529)
    Marker R_Knee: Right_thigh (0.00438889 -0.0865874 4.40399e-5)
    Marker R_Ankle: Right_fibula_AC (0.00992944 -0.0373674 0.00180874)
    Marker R_MTP: Right_tarsals_metatarsus (0.0061107 -0.0392763 -0.00479786)
    Marker R_Toe: Right_pedal_digits (0.0137154 -0.0426058 -0.00258039)
